Fri 04 Aug 2023 04:30:59 PM UTC
;Model Desc: 01-iv-2cmt-linear multiple dose
;Project Name: Bayesian Benchmarks
$PROBLEM
$INPUT      ID AMT RATE II ADDL CMT EVID SS LLOQ BLOQ MDV TIME ODV DV
$DATA      multiple_dose.csv IGNORE=@
$SUBROUTINE ADVAN3 TRANS4
$PK
MU_1=THETA(1)
MU_2=THETA(2)
MU_3=THETA(3)
MU_4=THETA(4)

CL=EXP(MU_1+ETA(1))
V1=EXP(MU_2+ETA(2))
Q=EXP(MU_3+ETA(3))
V2=EXP(MU_4+ETA(4))
S1=V1

$ERROR
IPRED=LOG(F)
Y=IPRED + EPS(1)

; Initial Estimates
$THETA  1.922
 4.789
 1.578
 3.957
$OMEGA  BLOCK(4)
 0.325
 0.01 0.294
 0.01 0.01 0.223
 0.01 0.01 0.01 0.342
$SIGMA  0.168
; Prior Specification
$PRIOR      NWPRI
$THETAP  1.386 FIX
 4.248 FIX
 1.386 FIX
 3.912 FIX
$THETAPV  BLOCK(4) FIX
 1
 0 1
 0 0 1
 0 0 0 1
$OMEGAP  BLOCK(4) FIX
 0.16
 0 0.16
 0 0 0.16
 0 0 0 0.16
$OMEGAPD  4 FIX
$SIGMAP  0.25  FIX
$SIGMAPD  1 FIX
$ESTIMATION METHOD=NUTS INTERACTION AUTO=1 PRINT=50 NBURN=500
            NITER=1000 OLKJDF=2 SEED=12345 FILE=psn.ext
$COVARIANCE UNCONDITIONAL MATRIX=R PRINT=E
$TABLE      ID EVID TIME IPRED NOPRINT ONEHEADER FORMAT=,1PE13.6
            FILE=iv-2cmt-linear-md-sdtab-run3-3.tab
$TABLE      ID CL V1 Q V2 ETA1 ETA2 ETA3 ETA4 NOPRINT NOAPPEND
            ONEHEADER FORMAT=,1PE13.6
            FILE=iv-2cmt-linear-md-patab-run3-3.tab

NM-TRAN MESSAGES
 WARNINGS AND ERRORS (IF ANY) FOR PROBLEM    1
 (WARNING  2) NM-TRAN INFERS THAT THE DATA ARE POPULATION.
Note: Analytical 2nd Derivatives are constructed in FSUBS but are never used.
      You may insert $ABBR DERIV2=NO after the first $PROB to save FSUBS construction and compilation time

1NONLINEAR MIXED EFFECTS MODEL PROGRAM (NONMEM) VERSION 7.5.1
 ORIGINALLY DEVELOPED BY STUART BEAL, LEWIS SHEINER, AND ALISON BOECKMANN
 CURRENT DEVELOPERS ARE ROBERT BAUER, ICON DEVELOPMENT SOLUTIONS,
 AND ALISON BOECKMANN. IMPLEMENTATION, EFFICIENCY, AND STANDARDIZATION
 PERFORMED BY NOUS INFOSYSTEMS.
 PROBLEM NO.:         1

 TOT. NO. OF OBS RECS:     4680
 TOT. NO. OF INDIVIDUALS:      120
 TWO COMPARTMENT MODEL (ADVAN3)
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 #TBLN:      1
 #METH: NUTS Bayesian Analysis
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
 #TERM:
 BURN-IN WAS NOT TESTED FOR CONVERGENCE
 STATISTICAL PORTION WAS COMPLETED

 ETABAR IS THE ARITHMETIC MEAN OF THE ETA-ESTIMATES,
 AND THE P-VALUE IS GIVEN FOR THE NULL HYPOTHESIS THAT THE TRUE MEAN IS 0.

 ETABAR:         5.1948E-04  5.8394E-05 -1.2218E-03 -1.0609E-03
 SE:             2.5608E-02  2.2954E-02  1.7121E-02  2.3753E-02
 N:                     120         120         120         120

 P VAL.:         9.8382E-01  9.9797E-01  9.4311E-01  9.6437E-01

 ETASHRINKSD(%)  3.1005E+00  8.0988E+00  4.6730E+01  1.9919E+01
 ETASHRINKVR(%)  6.1049E+00  1.5542E+01  7.1623E+01  3.5870E+01
 EBVSHRINKSD(%)  7.8727E-01  5.4018E+00  4.6089E+01  1.7165E+01
 EBVSHRINKVR(%)  1.5683E+00  1.0512E+01  7.0936E+01  3.1384E+01
 RELATIVEINF(%)  9.5176E+01  8.9218E+01  2.1383E+01  5.7631E+01
 EPSSHRINKSD(%)  3.8147E+00
 EPSSHRINKVR(%)  7.4839E+00


 TOTAL DATA POINTS NORMALLY DISTRIBUTED (N):         4680
 N*LOG(2PI) CONSTANT TO OBJECTIVE FUNCTION:    8601.2646707957356
 OBJECTIVE FUNCTION VALUE WITHOUT CONSTANT:   -11004.651153585080
 OBJECTIVE FUNCTION VALUE WITH CONSTANT:      -2403.3864827893449
 REPORTED OBJECTIVE FUNCTION DOES NOT CONTAIN CONSTANT

 TOTAL EFFECTIVE ETAS (NIND*NETA):                           480
 NIND*NETA*LOG(2PI) CONSTANT TO OBJECTIVE FUNCTION:    882.18099187648579
 OBJECTIVE FUNCTION VALUE WITHOUT CONSTANT:   -11004.651153585080
 OBJECTIVE FUNCTION VALUE WITH CONSTANT:      -10122.470161708594
 REPORTED OBJECTIVE FUNCTION DOES NOT CONTAIN CONSTANT

 PRIOR CONSTANT TO OBJECTIVE FUNCTION:    19.545385761883768
 OBJECTIVE FUNCTION VALUE WITHOUT CONSTANT:   -11004.651153585080
 OBJECTIVE FUNCTION VALUE WITH CONSTANT:      -10985.105767823197
 REPORTED OBJECTIVE FUNCTION DOES NOT CONTAIN CONSTANT


 #TERE:
 Elapsed estimation  time in seconds:   376.16
 Elapsed covariance  time in seconds:     0.00

 ********************                              NUTS BAYESIAN ANALYSIS                            ********************
 #OBJT:**************                       AVERAGE VALUE OF LIKELIHOOD FUNCTION                     ********************
 #OBJV:********************************************   -11004.651       **************************************************
 #OBJS:********************************************       58.140 (STD) **************************************************

 ********************                              NUTS BAYESIAN ANALYSIS                            ********************
 ********************                             FINAL PARAMETER ESTIMATE                           ********************

 THETA - VECTOR OF FIXED EFFECTS PARAMETERS   *********
         TH 1      TH 2      TH 3      TH 4
         1.41E+00  4.21E+00  1.44E+00  3.99E+00

 OMEGA - COV MATRIX FOR RANDOM EFFECTS - ETAS  ********
         ETA1      ETA2      ETA3      ETA4
 ETA1
+        8.38E-02
 ETA2
+        1.66E-03  7.49E-02
 ETA3
+       -1.01E-02 -2.77E-03  1.24E-01
 ETA4
+       -4.72E-03 -8.33E-03 -1.55E-02  1.06E-01

 SIGMA - COV MATRIX FOR RANDOM EFFECTS - EPSILONS  ****
         EPS1
 EPS1
+        4.06E-02

 OMEGA - CORR MATRIX FOR RANDOM EFFECTS - ETAS  *******
         ETA1      ETA2      ETA3      ETA4
 ETA1
+        2.89E-01
 ETA2
+        2.09E-02  2.73E-01
 ETA3
+       -1.13E-01 -2.46E-02  3.44E-01
 ETA4
+       -5.13E-02 -9.04E-02 -1.59E-01  3.23E-01

 SIGMA - CORR MATRIX FOR RANDOM EFFECTS - EPSILONS  ***
         EPS1
 EPS1
+        2.02E-01

 ********************                              NUTS BAYESIAN ANALYSIS                            ********************
 ********************                STANDARD ERROR OF ESTIMATE (From Sample Variance)               ********************

 THETA - VECTOR OF FIXED EFFECTS PARAMETERS   *********
         TH 1      TH 2      TH 3      TH 4
         2.62E-02  2.56E-02  7.36E-02  3.88E-02

 OMEGA - COV MATRIX FOR RANDOM EFFECTS - ETAS  ********
         ETA1      ETA2      ETA3      ETA4
 ETA1
+        1.09E-02
 ETA2
+        7.75E-03  1.16E-02
 ETA3
+        1.71E-02  1.87E-02  5.29E-02
 ETA4
+        1.09E-02  1.10E-02  2.32E-02  2.27E-02

 SIGMA - COV MATRIX FOR RANDOM EFFECTS - EPSILONS  ****
         EPS1
 EPS1
+        8.62E-04

 OMEGA - CORR MATRIX FOR RANDOM EFFECTS - ETAS  *******
         ETA1      ETA2      ETA3      ETA4
 ETA1
+        1.87E-02
 ETA2
+        9.70E-02  2.10E-02
 ETA3
+        1.75E-01  1.94E-01  7.37E-02
 ETA4
+        1.15E-01  1.19E-01  2.08E-01  3.47E-02

 SIGMA - CORR MATRIX FOR RANDOM EFFECTS - EPSILONS  ***
         EPS1
 EPS1
+        2.14E-03

 ********************                              NUTS BAYESIAN ANALYSIS                            ********************
 ********************               COVARIANCE MATRIX OF ESTIMATE (From Sample Variance)             ********************

            TH 1      TH 2      TH 3      TH 4      OM11      OM12      OM13      OM14      OM22      OM23      OM24      OM33
             OM34      OM44      SG11
 TH 1
+        6.87E-04
 TH 2
+        4.33E-05  6.53E-04
 TH 3
+        9.44E-05 -3.01E-04  5.42E-03
 TH 4
+       -4.58E-05 -1.57E-04  5.49E-04  1.51E-03
 OM11
+       -1.33E-05 -7.22E-06 -3.04E-05  4.53E-05  1.19E-04
 OM12
+       -2.37E-06 -6.66E-06  5.75E-05  1.42E-05  3.98E-06  6.01E-05
 OM13
+       -1.79E-06  1.16E-05 -3.16E-04  1.27E-05  1.53E-05 -8.27E-06  2.91E-04
 OM14
+        2.09E-06  6.35E-06 -1.90E-05 -5.56E-05 -4.40E-06 -1.94E-05 -4.63E-09  1.20E-04
 OM22
+        1.23E-05  1.98E-05 -6.31E-05 -1.17E-05  3.65E-06  8.84E-07  3.79E-06  3.75E-06  1.35E-04
 OM23
+        1.96E-05 -2.39E-05  5.84E-04  3.55E-05  1.46E-05  1.17E-05 -1.44E-05 -5.30E-06 -4.34E-05  3.48E-04
 OM24
+       -7.65E-06 -1.09E-05  7.94E-05  8.41E-05 -7.47E-06  2.59E-06  1.46E-06 -2.53E-06 -3.35E-05  2.74E-05  1.21E-04
 OM33
+       -1.38E-05 -5.39E-05 -1.50E-04  3.32E-04  4.18E-05 -3.08E-05  1.27E-04 -8.85E-07  2.88E-05 -1.19E-04  5.09E-05  2.79E-03
 OM34
+        1.72E-05  2.45E-05 -4.56E-04 -1.22E-04  6.96E-06 -8.78E-07  3.30E-05  6.57E-06  7.89E-06 -6.91E-05 -2.12E-05  2.13E-04
          5.40E-04
 OM44
+       -4.00E-05  3.73E-05 -4.38E-04 -1.02E-04  2.55E-06 -5.11E-06  4.40E-05  4.91E-06  1.16E-05 -4.91E-05 -5.88E-05  1.03E-04
          1.12E-04  5.15E-04
 SG11
+       -5.02E-07  7.80E-07 -6.23E-07 -1.89E-07  2.35E-07 -2.29E-07 -4.72E-07  7.55E-07 -2.35E-07 -6.64E-07 -1.45E-07 -5.37E-06
         -1.35E-06 -1.11E-06  7.42E-07

 ********************                              NUTS BAYESIAN ANALYSIS                            ********************
 ********************              CORRELATION MATRIX OF ESTIMATE (From Sample Variance)             ********************

            TH 1      TH 2      TH 3      TH 4      OM11      OM12      OM13      OM14      OM22      OM23      OM24      OM33
             OM34      OM44      SG11
 TH 1
+        2.62E-02
 TH 2
+        6.47E-02  2.56E-02
 TH 3
+        4.89E-02 -1.60E-01  7.36E-02
 TH 4
+       -4.49E-02 -1.58E-01  1.92E-01  3.88E-02
 OM11
+       -4.64E-02 -2.58E-02 -3.78E-02  1.07E-01  1.09E-02
 OM12
+       -1.17E-02 -3.36E-02  1.01E-01  4.71E-02  4.70E-02  7.75E-03
 OM13
+       -4.00E-03  2.66E-02 -2.51E-01  1.92E-02  8.19E-02 -6.25E-02  1.71E-02
 OM14
+        7.27E-03  2.27E-02 -2.36E-02 -1.31E-01 -3.68E-02 -2.28E-01 -2.48E-05  1.09E-02
 OM22
+        4.03E-02  6.66E-02 -7.38E-02 -2.59E-02  2.88E-02  9.82E-03  1.91E-02  2.95E-02  1.16E-02
 OM23
+        4.01E-02 -5.01E-02  4.25E-01  4.91E-02  7.19E-02  8.08E-02 -4.53E-02 -2.59E-02 -2.00E-01  1.87E-02
 OM24
+       -2.66E-02 -3.89E-02  9.82E-02  1.97E-01 -6.23E-02  3.04E-02  7.77E-03 -2.10E-02 -2.63E-01  1.34E-01  1.10E-02
 OM33
+       -9.99E-03 -3.99E-02 -3.86E-02  1.62E-01  7.23E-02 -7.52E-02  1.41E-01 -1.53E-03  4.69E-02 -1.21E-01  8.77E-02  5.29E-02
 OM34
+        2.82E-02  4.12E-02 -2.67E-01 -1.35E-01  2.74E-02 -4.88E-03  8.31E-02  2.59E-02  2.92E-02 -1.59E-01 -8.30E-02  1.73E-01
          2.32E-02
 OM44
+       -6.72E-02  6.44E-02 -2.62E-01 -1.15E-01  1.03E-02 -2.91E-02  1.14E-01  1.98E-02  4.41E-02 -1.16E-01 -2.36E-01  8.61E-02
          2.13E-01  2.27E-02
 SG11
+       -2.22E-02  3.54E-02 -9.83E-03 -5.65E-03  2.50E-02 -3.43E-02 -3.21E-02  8.00E-02 -2.35E-02 -4.13E-02 -1.53E-02 -1.18E-01
         -6.75E-02 -5.67E-02  8.62E-04
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
 ********************                              NUTS BAYESIAN ANALYSIS                            ********************
 ********************           EIGENVALUES OF COR MATRIX OF ESTIMATE (From Sample Variance)         ********************

             1         2         3         4         5         6         7         8         9        10        11        12
             13        14        15
         4.39E-01  5.90E-01  6.56E-01  7.08E-01  7.90E-01  8.24E-01  8.81E-01  9.16E-01  1.04E+00  1.06E+00  1.10E+00  1.14E+00
          1.26E+00  1.45E+00  2.13E+00
 Elapsed postprocess time in seconds:     0.11
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 Elapsed finaloutput time in seconds:     0.30
 #CPUT: Total CPU Time in Seconds,     1659.672
