Fri 04 Aug 2023 06:02:56 PM UTC
;Model Desc: 02-depot-1cmt-linear-md
;Project Name: Bayesian Benchmarks
$PROBLEM
$INPUT      ID AMT RATE II ADDL CMT EVID SS LLOQ BLOQ MDV TIME ODV DV
$DATA      multiple_dose.csv IGNORE=@
$SUBROUTINE ADVAN2 TRANS2
$PK
MU_1=THETA(1)
MU_2=THETA(2)
MU_3=THETA(3)

CL=EXP(MU_1+ETA(1))
V=EXP(MU_2+ETA(2))
KA=EXP(MU_3+ETA(3))

K=CL/V
S2=V

$ERROR
IPRED=LOG(F)
Y=IPRED + EPS(1)

; Initial Estimates
$THETA  1.168
 4.596
 -0.272
$OMEGA  BLOCK(3)
 0.434
 0.01 0.303
 0.01 0.01 0.199
$SIGMA  0.258
; Prior Specification
$PRIOR      NWPRI
$THETAP  1.386 FIX
 4.248 FIX
 0 FIX
$THETAPV  BLOCK(3) FIX
 1
 0 1
 0 0 1
$OMEGAP  BLOCK(3) FIX
 0.16
 0 0.16
 0 0 0.16
$OMEGAPD  3 FIX
$SIGMAP  0.25  FIX
$SIGMAPD  1 FIX
$ESTIMATION METHOD=NUTS INTERACTION AUTO=1 PRINT=50 NBURN=500
            NITER=1000 OLKJDF=2 SEED=12345 FILE=psn.ext NUTS_TEST=1
            NUTS_MASS=D
$COVARIANCE UNCONDITIONAL MATRIX=R PRINT=E
$TABLE      ID EVID TIME IPRED NOPRINT ONEHEADER FORMAT=,1PE13.6
            FILE=depot-1cmt-linear-md-sdtab-run1-2.tab
$TABLE      ID CL V K KA ETA1 ETA2 ETA3 NOPRINT NOAPPEND ONEHEADER
            FORMAT=,1PE13.6 FILE=depot-1cmt-linear-md-patab-run1-2.tab

NM-TRAN MESSAGES
 WARNINGS AND ERRORS (IF ANY) FOR PROBLEM    1
 (WARNING  2) NM-TRAN INFERS THAT THE DATA ARE POPULATION.
Note: Analytical 2nd Derivatives are constructed in FSUBS but are never used.
      You may insert $ABBR DERIV2=NO after the first $PROB to save FSUBS construction and compilation time

1NONLINEAR MIXED EFFECTS MODEL PROGRAM (NONMEM) VERSION 7.5.1
 ORIGINALLY DEVELOPED BY STUART BEAL, LEWIS SHEINER, AND ALISON BOECKMANN
 CURRENT DEVELOPERS ARE ROBERT BAUER, ICON DEVELOPMENT SOLUTIONS,
 AND ALISON BOECKMANN. IMPLEMENTATION, EFFICIENCY, AND STANDARDIZATION
 PERFORMED BY NOUS INFOSYSTEMS.
 PROBLEM NO.:         1

 TOT. NO. OF OBS RECS:     4680
 TOT. NO. OF INDIVIDUALS:      120
 ONE COMPARTMENT MODEL WITH FIRST-ORDER ABSORPTION (ADVAN2)
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 #TBLN:      1
 #METH: NUTS Bayesian Analysis
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
 #TERM:
 BURN-IN WAS NOT TESTED FOR CONVERGENCE
 STATISTICAL PORTION WAS COMPLETED

 ETABAR IS THE ARITHMETIC MEAN OF THE ETA-ESTIMATES,
 AND THE P-VALUE IS GIVEN FOR THE NULL HYPOTHESIS THAT THE TRUE MEAN IS 0.

 ETABAR:         2.3565E-05 -3.7502E-04 -9.2163E-04
 SE:             2.5986E-02  2.4399E-02  2.4491E-02
 N:                     120         120         120

 P VAL.:         9.9928E-01  9.8774E-01  9.6998E-01

 ETASHRINKSD(%)  2.8824E+00  4.7253E+00  1.9361E+01
 ETASHRINKVR(%)  5.6818E+00  9.2274E+00  3.4973E+01
 EBVSHRINKSD(%)  7.7698E-01  2.6880E+00  1.7241E+01
 EBVSHRINKVR(%)  1.5479E+00  5.3037E+00  3.1509E+01
 RELATIVEINF(%)  9.7917E+01  9.4809E+01  6.8542E+01
 EPSSHRINKSD(%)  3.4822E+00
 EPSSHRINKVR(%)  6.8432E+00


 TOTAL DATA POINTS NORMALLY DISTRIBUTED (N):         4680
 N*LOG(2PI) CONSTANT TO OBJECTIVE FUNCTION:    8601.2646707957356
 OBJECTIVE FUNCTION VALUE WITHOUT CONSTANT:   -10930.574155396000
 OBJECTIVE FUNCTION VALUE WITH CONSTANT:      -2329.3094846002641
 REPORTED OBJECTIVE FUNCTION DOES NOT CONTAIN CONSTANT

 TOTAL EFFECTIVE ETAS (NIND*NETA):                           360
 NIND*NETA*LOG(2PI) CONSTANT TO OBJECTIVE FUNCTION:    661.63574390736437
 OBJECTIVE FUNCTION VALUE WITHOUT CONSTANT:   -10930.574155396000
 OBJECTIVE FUNCTION VALUE WITH CONSTANT:      -10268.938411488636
 REPORTED OBJECTIVE FUNCTION DOES NOT CONTAIN CONSTANT

 PRIOR CONSTANT TO OBJECTIVE FUNCTION:    15.482400502239656
 OBJECTIVE FUNCTION VALUE WITHOUT CONSTANT:   -10930.574155396000
 OBJECTIVE FUNCTION VALUE WITH CONSTANT:      -10915.091754893760
 REPORTED OBJECTIVE FUNCTION DOES NOT CONTAIN CONSTANT


 #TERE:
 Elapsed estimation  time in seconds:   494.64
 Elapsed covariance  time in seconds:     0.00

 ********************                              NUTS BAYESIAN ANALYSIS                            ********************
 #OBJT:**************                       AVERAGE VALUE OF LIKELIHOOD FUNCTION                     ********************
 #OBJV:********************************************   -10930.574       **************************************************
 #OBJS:********************************************       29.088 (STD) **************************************************

 ********************                              NUTS BAYESIAN ANALYSIS                            ********************
 ********************                             FINAL PARAMETER ESTIMATE                           ********************

 THETA - VECTOR OF FIXED EFFECTS PARAMETERS   *********
         TH 1      TH 2      TH 3
         1.37E+00  4.24E+00 -1.22E-02

 OMEGA - COV MATRIX FOR RANDOM EFFECTS - ETAS  ********
         ETA1      ETA2      ETA3
 ETA1
+        8.59E-02
 ETA2
+       -1.19E-02  7.87E-02
 ETA3
+       -1.17E-03  1.32E-02  1.11E-01

 SIGMA - COV MATRIX FOR RANDOM EFFECTS - EPSILONS  ****
         EPS1
 EPS1
+        3.98E-02

 OMEGA - CORR MATRIX FOR RANDOM EFFECTS - ETAS  *******
         ETA1      ETA2      ETA3
 ETA1
+        2.92E-01
 ETA2
+       -1.45E-01  2.80E-01
 ETA3
+       -1.24E-02  1.39E-01  3.31E-01

 SIGMA - CORR MATRIX FOR RANDOM EFFECTS - EPSILONS  ***
         EPS1
 EPS1
+        1.99E-01

 ********************                              NUTS BAYESIAN ANALYSIS                            ********************
 ********************                STANDARD ERROR OF ESTIMATE (From Sample Variance)               ********************

 THETA - VECTOR OF FIXED EFFECTS PARAMETERS   *********
         TH 1      TH 2      TH 3
         2.63E-02  2.55E-02  3.75E-02

 OMEGA - COV MATRIX FOR RANDOM EFFECTS - ETAS  ********
         ETA1      ETA2      ETA3
 ETA1
+        1.15E-02
 ETA2
+        7.88E-03  1.13E-02
 ETA3
+        1.12E-02  1.11E-02  1.99E-02

 SIGMA - COV MATRIX FOR RANDOM EFFECTS - EPSILONS  ****
         EPS1
 EPS1
+        8.48E-04

 OMEGA - CORR MATRIX FOR RANDOM EFFECTS - ETAS  *******
         ETA1      ETA2      ETA3
 ETA1
+        1.94E-02
 ETA2
+        9.17E-02  2.00E-02
 ETA3
+        1.14E-01  1.12E-01  2.97E-02

 SIGMA - CORR MATRIX FOR RANDOM EFFECTS - EPSILONS  ***
         EPS1
 EPS1
+        2.12E-03

 ********************                              NUTS BAYESIAN ANALYSIS                            ********************
 ********************               COVARIANCE MATRIX OF ESTIMATE (From Sample Variance)             ********************

            TH 1      TH 2      TH 3      OM11      OM12      OM13      OM22      OM23      OM33      SG11
 TH 1
+        6.94E-04
 TH 2
+       -8.18E-05  6.50E-04
 TH 3
+        1.91E-05  2.06E-04  1.40E-03
 OM11
+       -7.27E-06 -1.13E-05  7.06E-06  1.32E-04
 OM12
+        3.26E-06  3.95E-06 -2.79E-06 -1.43E-05  6.21E-05
 OM13
+       -1.29E-05 -2.44E-05 -8.19E-05  1.06E-05  1.22E-05  1.26E-04
 OM22
+       -1.84E-05 -1.76E-05 -1.31E-05  6.94E-06 -1.54E-05  1.18E-06  1.28E-04
 OM23
+        1.86E-05  2.33E-05  7.23E-05 -8.50E-06 -1.83E-06 -2.82E-05  3.18E-05  1.23E-04
 OM33
+       -4.25E-06  5.74E-06  3.94E-05 -2.19E-06 -2.00E-05 -1.22E-05  2.08E-05  6.91E-05  3.97E-04
 SG11
+        1.10E-06  1.99E-06  1.34E-06 -6.15E-07  1.66E-07  2.01E-07 -2.85E-07 -4.48E-07 -7.56E-07  7.19E-07

 ********************                              NUTS BAYESIAN ANALYSIS                            ********************
 ********************              CORRELATION MATRIX OF ESTIMATE (From Sample Variance)             ********************

            TH 1      TH 2      TH 3      OM11      OM12      OM13      OM22      OM23      OM33      SG11
 TH 1
+        2.63E-02
 TH 2
+       -1.22E-01  2.55E-02
 TH 3
+        1.93E-02  2.16E-01  3.75E-02
 OM11
+       -2.40E-02 -3.87E-02  1.64E-02  1.15E-02
 OM12
+        1.57E-02  1.97E-02 -9.46E-03 -1.58E-01  7.88E-03
 OM13
+       -4.37E-02 -8.51E-02 -1.94E-01  8.24E-02  1.38E-01  1.12E-02
 OM22
+       -6.16E-02 -6.11E-02 -3.10E-02  5.34E-02 -1.73E-01  9.31E-03  1.13E-02
 OM23
+        6.37E-02  8.22E-02  1.74E-01 -6.66E-02 -2.09E-02 -2.26E-01  2.53E-01  1.11E-02
 OM33
+       -8.09E-03  1.13E-02  5.27E-02 -9.55E-03 -1.27E-01 -5.43E-02  9.22E-02  3.12E-01  1.99E-02
 SG11
+        4.94E-02  9.21E-02  4.20E-02 -6.32E-02  2.49E-02  2.11E-02 -2.97E-02 -4.76E-02 -4.47E-02  8.48E-04
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
 ********************                              NUTS BAYESIAN ANALYSIS                            ********************
 ********************           EIGENVALUES OF COR MATRIX OF ESTIMATE (From Sample Variance)         ********************

             1         2         3         4         5         6         7         8         9        10
         5.18E-01  6.98E-01  7.34E-01  8.71E-01  9.23E-01  9.99E-01  1.07E+00  1.15E+00  1.37E+00  1.67E+00
 Elapsed postprocess time in seconds:     0.22
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 Elapsed finaloutput time in seconds:     0.55
 #CPUT: Total CPU Time in Seconds,     1573.506
