Mon 07 Aug 2023 12:15:07 PM UTC
;Model Desc: 03-depot-2cmt-linear-md
;Project Name: Bayesian Benchmarks
$PROBLEM
$INPUT      ID AMT RATE II ADDL CMT EVID SS LLOQ BLOQ MDV TIME ODV DV
$DATA      multiple_dose.csv IGNORE=@
$SUBROUTINE ADVAN4 TRANS4
$PK
MU_1=THETA(1)
MU_2=THETA(2)
MU_3=THETA(3)
MU_4=THETA(4)
MU_5=THETA(5)

CL=EXP(MU_1+ETA(1))
V2=EXP(MU_2+ETA(2))
Q=EXP(MU_3+ETA(3))
V3=EXP(MU_4+ETA(4))
KA=EXP(MU_5+ETA(5))

K=CL/V2
K23=Q/V2
K32=Q/V3
S2=V2

$ERROR
IPRED=LOG(F)
Y=IPRED + EPS(1)

; Initial Estimates
$THETA  1.388
 4.569
 1.038
 3.305
 -0.139
$OMEGA  BLOCK(5)
 0.234
 0.01 0.508
 0.01 0.01 0.215
 0.01 0.01 0.01 0.293
 0.01 0.01 0.01 0.01 0.167
$SIGMA  0.158
; Prior Specification
$PRIOR      NWPRI
$THETAP  1.386 FIX
 4.248 FIX
 1.386 FIX
 3.689 FIX
 0 FIX
$THETAPV  BLOCK(5) FIX
 1
 0 1
 0 0 1
 0 0 0 1
 0 0 0 0 1
$OMEGAP  BLOCK(5) FIX
 0.16
 0 0.16
 0 0 0.16
 0 0 0 0.16
 0 0 0 0 0.16
$OMEGAPD  5 FIX
$SIGMAP  0.25  FIX
$SIGMAPD  1 FIX
$ESTIMATION METHOD=NUTS INTERACTION AUTO=1 PRINT=50 NBURN=500
            NITER=1000 OLKJDF=2 SEED=12345 FILE=psn.ext
$COVARIANCE UNCONDITIONAL MATRIX=R PRINT=E
$TABLE      ID EVID TIME IPRED NOPRINT ONEHEADER FORMAT=,1PE13.6
            FILE=depot-2cmt-linear-md-sdtab-run1-1.tab
$TABLE      ID CL V2 Q V3 KA K K23 K32 ETAS(1:LAST) NOPRINT NOAPPEND
            ONEHEADER FORMAT=,1PE13.6
            FILE=depot-2cmt-linear-md-patab-run1-1.tab

NM-TRAN MESSAGES
 WARNINGS AND ERRORS (IF ANY) FOR PROBLEM    1
 (WARNING  2) NM-TRAN INFERS THAT THE DATA ARE POPULATION.
Note: Analytical 2nd Derivatives are constructed in FSUBS but are never used.
      You may insert $ABBR DERIV2=NO after the first $PROB to save FSUBS construction and compilation time

1NONLINEAR MIXED EFFECTS MODEL PROGRAM (NONMEM) VERSION 7.5.1
 ORIGINALLY DEVELOPED BY STUART BEAL, LEWIS SHEINER, AND ALISON BOECKMANN
 CURRENT DEVELOPERS ARE ROBERT BAUER, ICON DEVELOPMENT SOLUTIONS,
 AND ALISON BOECKMANN. IMPLEMENTATION, EFFICIENCY, AND STANDARDIZATION
 PERFORMED BY NOUS INFOSYSTEMS.
 PROBLEM NO.:         1

 TOT. NO. OF OBS RECS:     4680
 TOT. NO. OF INDIVIDUALS:      120
 TWO COMPARTMENT MODEL WITH FIRST-ORDER ABSORPTION (ADVAN4)
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 #TBLN:      1
 #METH: NUTS Bayesian Analysis
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
 #TERM:
 BURN-IN WAS NOT TESTED FOR CONVERGENCE
 STATISTICAL PORTION WAS COMPLETED

 ETABAR IS THE ARITHMETIC MEAN OF THE ETA-ESTIMATES,
 AND THE P-VALUE IS GIVEN FOR THE NULL HYPOTHESIS THAT THE TRUE MEAN IS 0.

 ETABAR:        -4.2330E-03 -2.5951E-03  1.0336E-03 -1.0565E-03 -9.3212E-04
 SE:             2.7307E-02  2.8748E-02  7.7665E-03  2.0515E-02  1.5251E-02
 N:                     120         120         120         120         120

 P VAL.:         8.7681E-01  9.2807E-01  8.9413E-01  9.5893E-01  9.5126E-01

 ETASHRINKSD(%)  2.6964E+00  7.7145E+00  5.8520E+01  2.3314E+01  3.3786E+01
 ETASHRINKVR(%)  5.3200E+00  1.4834E+01  8.2794E+01  4.1192E+01  5.6157E+01
 EBVSHRINKSD(%)  6.6641E-01  5.6137E+00  1.0000E+02  2.2162E+01  3.2988E+01
 EBVSHRINKVR(%)  1.3284E+00  1.0912E+01  1.0000E+02  3.9412E+01  5.5094E+01
 RELATIVEINF(%)  9.8045E+01  7.9611E+01  1.0000E-10  8.3209E+01  5.0069E+01
 EPSSHRINKSD(%)  3.8257E+00
 EPSSHRINKVR(%)  7.5050E+00


 TOTAL DATA POINTS NORMALLY DISTRIBUTED (N):         4680
 N*LOG(2PI) CONSTANT TO OBJECTIVE FUNCTION:    8601.2646707957356
 OBJECTIVE FUNCTION VALUE WITHOUT CONSTANT:   -11536.651403595130
 OBJECTIVE FUNCTION VALUE WITH CONSTANT:      -2935.3867327993939
 REPORTED OBJECTIVE FUNCTION DOES NOT CONTAIN CONSTANT

 TOTAL EFFECTIVE ETAS (NIND*NETA):                           600
 NIND*NETA*LOG(2PI) CONSTANT TO OBJECTIVE FUNCTION:    1102.7262398456071
 OBJECTIVE FUNCTION VALUE WITHOUT CONSTANT:   -11536.651403595130
 OBJECTIVE FUNCTION VALUE WITH CONSTANT:      -10433.925163749522
 REPORTED OBJECTIVE FUNCTION DOES NOT CONTAIN CONSTANT

 PRIOR CONSTANT TO OBJECTIVE FUNCTION:    23.073772503052208
 OBJECTIVE FUNCTION VALUE WITHOUT CONSTANT:   -11536.651403595130
 OBJECTIVE FUNCTION VALUE WITH CONSTANT:      -11513.577631092077
 REPORTED OBJECTIVE FUNCTION DOES NOT CONTAIN CONSTANT


 #TERE:
 Elapsed estimation  time in seconds:   837.36
 Elapsed covariance  time in seconds:     0.00

 ********************                              NUTS BAYESIAN ANALYSIS                            ********************
 #OBJT:**************                       AVERAGE VALUE OF LIKELIHOOD FUNCTION                     ********************
 #OBJV:********************************************   -11536.651       **************************************************
 #OBJS:********************************************      119.324 (STD) **************************************************

 ********************                              NUTS BAYESIAN ANALYSIS                            ********************
 ********************                             FINAL PARAMETER ESTIMATE                           ********************

 THETA - VECTOR OF FIXED EFFECTS PARAMETERS   *********
         TH 1      TH 2      TH 3      TH 4      TH 5
         1.42E+00  4.29E+00  1.34E+00  3.89E+00  6.69E-02

 OMEGA - COV MATRIX FOR RANDOM EFFECTS - ETAS  ********
         ETA1      ETA2      ETA3      ETA4      ETA5
 ETA1
+        9.45E-02
 ETA2
+       -2.03E-03  1.16E-01
 ETA3
+        8.94E-03 -1.28E-02  4.21E-02
 ETA4
+       -8.60E-03 -7.98E-03 -1.44E-02  8.59E-02
 ETA5
+       -1.94E-03 -5.48E-03  2.57E-04  1.16E-02  6.37E-02

 SIGMA - COV MATRIX FOR RANDOM EFFECTS - EPSILONS  ****
         EPS1
 EPS1
+        3.95E-02

 OMEGA - CORR MATRIX FOR RANDOM EFFECTS - ETAS  *******
         ETA1      ETA2      ETA3      ETA4      ETA5
 ETA1
+        3.07E-01
 ETA2
+       -1.87E-02  3.40E-01
 ETA3
+        1.46E-01 -1.72E-01  1.86E-01
 ETA4
+       -9.48E-02 -7.36E-02 -3.08E-01  2.91E-01
 ETA5
+       -2.85E-02 -7.81E-02  3.38E-02  1.67E-01  2.48E-01

 SIGMA - CORR MATRIX FOR RANDOM EFFECTS - EPSILONS  ***
         EPS1
 EPS1
+        1.99E-01

 ********************                              NUTS BAYESIAN ANALYSIS                            ********************
 ********************                STANDARD ERROR OF ESTIMATE (From Sample Variance)               ********************

 THETA - VECTOR OF FIXED EFFECTS PARAMETERS   *********
         TH 1      TH 2      TH 3      TH 4      TH 5
         2.85E-02  3.83E-02  1.02E-01  4.72E-02  4.24E-02

 OMEGA - COV MATRIX FOR RANDOM EFFECTS - ETAS  ********
         ETA1      ETA2      ETA3      ETA4      ETA5
 ETA1
+        1.30E-02
 ETA2
+        9.64E-03  1.81E-02
 ETA3
+        1.57E-02  2.23E-02  3.91E-02
 ETA4
+        1.11E-02  1.42E-02  1.34E-02  1.96E-02
 ETA5
+        1.21E-02  1.31E-02  1.64E-02  1.25E-02  2.21E-02

 SIGMA - COV MATRIX FOR RANDOM EFFECTS - EPSILONS  ****
         EPS1
 EPS1
+        8.56E-04

 OMEGA - CORR MATRIX FOR RANDOM EFFECTS - ETAS  *******
         ETA1      ETA2      ETA3      ETA4      ETA5
 ETA1
+        2.08E-02
 ETA2
+        8.98E-02  2.63E-02
 ETA3
+        2.72E-01  2.75E-01  8.68E-02
 ETA4
+        1.20E-01  1.38E-01  2.45E-01  3.25E-02
 ETA5
+        1.61E-01  1.63E-01  2.96E-01  1.77E-01  4.39E-02

 SIGMA - CORR MATRIX FOR RANDOM EFFECTS - EPSILONS  ***
         EPS1
 EPS1
+        2.15E-03
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
 ********************                              NUTS BAYESIAN ANALYSIS                            ********************
 ********************           EIGENVALUES OF COR MATRIX OF ESTIMATE (From Sample Variance)         ********************

             1         2         3         4         5         6         7         8         9        10        11        12
             13        14        15        16        17        18        19        20        21
         1.68E-01  3.74E-01  4.06E-01  4.18E-01  4.57E-01  4.90E-01  5.88E-01  6.01E-01  6.77E-01  7.31E-01  7.65E-01  8.12E-01
          9.44E-01  9.53E-01  9.87E-01  1.12E+00  1.47E+00  1.65E+00  1.82E+00  2.36E+00  3.21E+00
 Elapsed postprocess time in seconds:     0.18
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 Elapsed finaloutput time in seconds:     0.46
 #CPUT: Total CPU Time in Seconds,     2731.432
