Fri 15 Sep 2023 10:30:37 PM UTC
;Model Desc: 05-friberg
;Project Name: Bayesian Benchmarks
$SIZES      LVR=50
$PROBLEM
$INPUT      ID AMT RATE II ADDL CMT EVID SS LLOQ BLOQ MDV TIME CP ODV
            DV
$DATA      multiple_dose_nonmem.csv IGNORE=@
$SUBROUTINE ADVAN13 TOL=6
$MODEL      NCOMP=8 COMP=(GUT,DEFDOSE) COMP=(CENT) COMP=(PERIPH)
            COMP=(PROL) COMP=(TRANS1) COMP=(TRANS2) COMP=(TRANS3)
            COMP=(CIRC)
$PK
MU_1 = THETA(1)     ; CL
MU_2 = THETA(2)     ; V1
MU_3 = THETA(3)     ; Q
MU_4 = THETA(4)     ; V2
MU_5 = THETA(5)     ; KA
MU_6 = THETA(6)     ; MTT
MU_7 = THETA(7)     ; CIRC0
MU_8 = THETA(8)     ; GAMMA
MU_9 = THETA(9)     ; ALPHA

CL  = EXP(MU_1 +ETA(1))
V1  = EXP(MU_2 +ETA(2))
Q   = EXP(MU_3 +ETA(3))
V2  = EXP(MU_4 +ETA(4))
KA  = EXP(MU_5 +ETA(5))
MTT = EXP(MU_6 +ETA(6))
CIRC0 = EXP(MU_7 +ETA(7))
GAMMA = EXP(MU_8 +ETA(8))
ALPHA = EXP(MU_9 +ETA(9))

; intermediate calculations
K10 = CL/V1
K12 = Q/V1
K21 = Q/V2
KTR = 4/MTT

KPROL = KTR
KCIRC = KTR

; initial PK conditions
A_0(1) = 0
A_0(2) = 0
A_0(3) = 0

; initial PD conditions
A_0(4) = CIRC0
A_0(5) = CIRC0
A_0(6) = CIRC0
A_0(7) = CIRC0
A_0(8) = CIRC0

S2 = V1
S3 = V2

$DES
CONC = A(2)/V1
EDRUG = ALPHA * CONC
IF(EDRUG > 1.0) EDRUG = 1.0

DADT(1) = -KA * A(1)
DADT(2) = KA * A(1) - (K10 + K12) * A(2) + K21 * A(3)
DADT(3) = K12 * A(2) - K21 * A(3)
DADT(4) = KPROL * A(4) * (1 - EDRUG) * ((CIRC0 / A(8))**GAMMA) - KTR * A(4)
DADT(5) = KTR * (A(4) - A(5))
DADT(6) = KTR * (A(5) - A(6))
DADT(7) = KTR * (A(6) - A(7))
DADT(8) = KTR * A(7) - KCIRC * A(8)

$ERROR
IPRED = LOG(F)
IND = 0
IF(CMT.EQ.2) IND = 1
YPK = IPRED + EPS(1) ; Exp Err PK
YPD = IPRED + EPS(2) ; Exp Err PD
Y = YPK*IND + YPD*(1-IND)

; Initial Estimates
$THETA  1.366
 4.109
 1.458
 3.447
 -0.211
 4.429
 1.813
 -1.992
 -8.568
$OMEGA  BLOCK(9)
 0.34426
 0.01 0.29171
 0.01 0.01 0.30877
 0.01 0.01 0.01 0.29412
 0.01 0.01 0.01 0.01 0.35148
 0.01 0.01 0.01 0.01 0.01 0.30007
 0.01 0.01 0.01 0.01 0.01 0.01 0.28102
 0.01 0.01 0.01 0.01 0.01 0.01 0.01 0.46614
 0.01 0.01 0.01 0.01 0.01 0.01 0.01 0.01 0.23448
$SIGMA  0.18093
 0.30654
; Prior Specification
$PRIOR      NWPRI
$THETAP  1.386 FIX ; CL Log(4)
 4.248 FIX ; V1 Log(70)
 1.386 FIX ; Q  Log(4)
 3.689 FIX ; V2 Log(40)
 0 FIX ; KA log(1)
 4.828 FIX ; MTT Log(125)
 1.609 FIX ; CIRC0 Log(5)
 -1.772 FIX ; GAMMA Log(0.17)
 -8.112 FIX ; ALPHA Log(3E-4)
$THETAPV  BLOCK(9) FIX
 1  ;         CL
 0.00 1  ;         V1
 0.00 0.00 1  ;          Q
 0.00 0.00 0.00 1  ;         V2
 0.00 0.00 0.00 0.00 1  ;         KA
 0.00 0.00 0.00 0.00 0.00 1  ;        MTT
 0.00 0.00 0.00 0.00 0.00 0.00 1  ;      CIRC0
 0.00 0.00 0.00 0.00 0.00 0.00 0.00 1  ;      GAMMA
 0.00 0.00 0.00 0.00 0.00 0.00 0.00 0.00 1  ;      ALPHA
$OMEGAP  BLOCK(9) FIX
 0.16  ;         CL
 0.00 0.16  ;         V1
 0.00 0.00 0.16  ;          Q
 0.00 0.00 0.00 0.16  ;         V2
 0.00 0.00 0.00 0.00 0.16  ;         KA
 0.00 0.00 0.00 0.00 0.00 0.16  ;        MTT
 0.00 0.00 0.00 0.00 0.00 0.00 0.16  ;      CIRC0
 0.00 0.00 0.00 0.00 0.00 0.00 0.00 0.16  ;      GAMMA
 0.00 0.00 0.00 0.00 0.00 0.00 0.00 0.00 0.16  ;      ALPHA
$OMEGAPD  9 FIX
$SIGMAP  0.25  FIX
 0.25  FIX  ; INVERSE WISHART VAR
$SIGMAPD  1
 1 FIX
$ESTIMATION METHOD=NUTS INTERACTION AUTO=1 PRINT=50 NBURN=500
            NITER=1000 OLKJDF=2 SEED=12345 FILE=psn.ext
$COVARIANCE UNCONDITIONAL MATRIX=R PRINT=E
$TABLE      ID EVID TIME IPRED NOPRINT ONEHEADER FORMAT=,1PE13.6
            FILE=friberg-sdtab-run5-4.tab
$TABLE      ID CL V1 Q V2 KA MTT CIRC0 GAMMA ALPHA ETAS(1:LAST)
            NOPRINT NOAPPEND ONEHEADER FORMAT=,1PE13.6
            FILE=friberg-patab-run5-4.tab

NM-TRAN MESSAGES
 WARNINGS AND ERRORS (IF ANY) FOR PROBLEM    1
 (WARNING  2) NM-TRAN INFERS THAT THE DATA ARE POPULATION.
 (WARNING  73) COMPARTMENT AMOUNTS ARE INITIALIZED IN $PK ABBREVIATED CODE,
 BUT THE SS DATA ITEM IS DEFINED. THE SS DOSE EVENT RECORDS SHOULD SPECIFY
 SS=2 OR SS=3.
 (WARNING  40) $THETA INCLUDES A NON-FIXED INITIAL ESTIMATE CORRESPONDING TO
 A THETA THAT IS NOT USED IN ABBREVIATED CODE.
 THIS WARNING APPLIES TO THE FOLLOWING THETAS:
 THETA     20
 (WARNING  41) NON-FIXED PARAMETER ESTIMATES CORRESPONDING TO UNUSED
 PARAMETERS MAY CAUSE THE COVARIANCE STEP TO FAIL.
Note: Analytical 2nd Derivatives are constructed in FSUBS but are never used.
      You may insert $ABBR DERIV2=NO after the first $PROB to save FSUBS construction and compilation time

1NONLINEAR MIXED EFFECTS MODEL PROGRAM (NONMEM) VERSION 7.5.1
 ORIGINALLY DEVELOPED BY STUART BEAL, LEWIS SHEINER, AND ALISON BOECKMANN
 CURRENT DEVELOPERS ARE ROBERT BAUER, ICON DEVELOPMENT SOLUTIONS,
 AND ALISON BOECKMANN. IMPLEMENTATION, EFFICIENCY, AND STANDARDIZATION
 PERFORMED BY NOUS INFOSYSTEMS.
 PROBLEM NO.:         1

 TOT. NO. OF OBS RECS:      816
 TOT. NO. OF INDIVIDUALS:       12
 GENERAL NONLINEAR KINETICS MODEL WITH STIFF/NONSTIFF EQUATIONS (LSODA, ADVAN13)
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 #TBLN:      1
 #METH: NUTS Bayesian Analysis
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
 #TERM:
 BURN-IN WAS NOT TESTED FOR CONVERGENCE
 STATISTICAL PORTION WAS COMPLETED

 ETABAR IS THE ARITHMETIC MEAN OF THE ETA-ESTIMATES,
 AND THE P-VALUE IS GIVEN FOR THE NULL HYPOTHESIS THAT THE TRUE MEAN IS 0.

 ETABAR:         3.0203E-03 -2.3672E-03  2.2377E-03  2.2297E-04  3.0267E-03  2.1787E-03  2.2903E-03 -2.1393E-02  2.1748E-03
 SE:             9.4307E-02  4.2270E-02  1.1560E-02  4.8305E-02  4.9297E-02  5.1015E-02  9.0374E-02  1.1797E-01  8.4366E-02
 N:                      12          12          12          12          12          12          12          12          12

 P VAL.:         9.7445E-01  9.5534E-01  8.4651E-01  9.9632E-01  9.5104E-01  9.6594E-01  9.7978E-01  8.5610E-01  9.7943E-01

 ETASHRINKSD(%)  2.3149E+01  3.7650E+01  8.0839E+01  4.0907E+01  4.2533E+01  4.5060E+01  2.0375E+01  4.3194E+01  3.8621E+01
 ETASHRINKVR(%)  4.0939E+01  6.1124E+01  9.6329E+01  6.5081E+01  6.6975E+01  6.9816E+01  3.6599E+01  6.7731E+01  6.2326E+01
 EBVSHRINKSD(%)  3.3616E-01  3.8930E+01  1.0000E+02  2.4005E+01  5.0744E+01  2.7477E+01  1.5643E+00  3.4347E+01  2.4737E+01
 EBVSHRINKVR(%)  6.7119E-01  6.2704E+01  1.0000E+02  4.2248E+01  7.5738E+01  4.7404E+01  3.1042E+00  5.6897E+01  4.3355E+01
 RELATIVEINF(%)  9.7746E+01  6.6507E+01  9.5242E+01  8.2304E+01  5.4831E+01  2.6802E+01  9.4507E+01  2.2873E+01  4.7055E+01
 EPSSHRINKSD(%)  5.0803E+00  5.9369E+00
 EPSSHRINKVR(%)  9.9024E+00  1.1521E+01


 TOTAL DATA POINTS NORMALLY DISTRIBUTED (N):          816
 N*LOG(2PI) CONSTANT TO OBJECTIVE FUNCTION:    1499.7076861900257
 OBJECTIVE FUNCTION VALUE WITHOUT CONSTANT:   -1972.6524975778711
 OBJECTIVE FUNCTION VALUE WITH CONSTANT:      -472.94481138784545
 REPORTED OBJECTIVE FUNCTION DOES NOT CONTAIN CONSTANT

 TOTAL EFFECTIVE ETAS (NIND*NETA):                           108
 NIND*NETA*LOG(2PI) CONSTANT TO OBJECTIVE FUNCTION:    198.49072317220930
 OBJECTIVE FUNCTION VALUE WITHOUT CONSTANT:   -1972.6524975778711
 OBJECTIVE FUNCTION VALUE WITH CONSTANT:      -1774.1617744056618
 REPORTED OBJECTIVE FUNCTION DOES NOT CONTAIN CONSTANT

 PRIOR CONSTANT TO OBJECTIVE FUNCTION:    31.260873039326768
 OBJECTIVE FUNCTION VALUE WITHOUT CONSTANT:   -1972.6524975778711
 OBJECTIVE FUNCTION VALUE WITH CONSTANT:      -1941.3916245385444
 REPORTED OBJECTIVE FUNCTION DOES NOT CONTAIN CONSTANT


 #TERE:
 Elapsed estimation  time in seconds:  6551.07
 Elapsed covariance  time in seconds:     0.00

 ********************                              NUTS BAYESIAN ANALYSIS                            ********************
 #OBJT:**************                       AVERAGE VALUE OF LIKELIHOOD FUNCTION                     ********************
 #OBJV:********************************************    -1972.652       **************************************************
 #OBJS:********************************************       26.341 (STD) **************************************************

 ********************                              NUTS BAYESIAN ANALYSIS                            ********************
 ********************                             FINAL PARAMETER ESTIMATE                           ********************

 THETA - VECTOR OF FIXED EFFECTS PARAMETERS   *********
         TH 1      TH 2      TH 3      TH 4      TH 5      TH 6      TH 7      TH 8      TH 9
         1.39E+00  3.91E+00  1.47E+00  3.88E+00 -2.95E-01  4.74E+00  1.60E+00 -2.06E+00 -8.04E+00

 OMEGA - COV MATRIX FOR RANDOM EFFECTS - ETAS  ********
         ETA1      ETA2      ETA3      ETA4      ETA5      ETA6      ETA7      ETA8      ETA9
 ETA1
+        1.81E-01
 ETA2
+       -1.06E-02  5.52E-02
 ETA3
+       -5.68E-03 -3.46E-03  4.37E-02
 ETA4
+        8.78E-03  5.39E-03  2.82E-03  8.02E-02
 ETA5
+       -1.26E-03  1.67E-03 -4.85E-03  6.02E-03  8.83E-02
 ETA6
+       -1.37E-02  8.58E-03  1.91E-03  3.41E-03  1.47E-03  1.03E-01
 ETA7
+       -1.61E-02  9.92E-03 -2.79E-03  8.06E-03 -1.51E-02 -2.52E-03  1.55E-01
 ETA8
+        5.11E-03  5.57E-03 -2.63E-03  2.91E-03 -2.45E-02 -8.17E-03  1.43E-02  5.18E-01
 ETA9
+       -6.92E-03 -9.72E-03  6.05E-04  2.81E-03  2.15E-02  5.13E-03  1.60E-03  7.77E-02  2.27E-01

 SIGMA - COV MATRIX FOR RANDOM EFFECTS - EPSILONS  ****
         EPS1      EPS2
 EPS1
+        3.75E-02
 EPS2
+        0.00E+00  4.52E-02

 OMEGA - CORR MATRIX FOR RANDOM EFFECTS - ETAS  *******
         ETA1      ETA2      ETA3      ETA4      ETA5      ETA6      ETA7      ETA8      ETA9
 ETA1
+        4.14E-01
 ETA2
+       -1.09E-01  2.19E-01
 ETA3
+       -6.61E-02 -6.79E-02  1.79E-01
 ETA4
+        8.68E-02  1.15E-01  4.82E-02  2.63E-01
 ETA5
+       -2.76E-02 -1.03E-02 -5.63E-02  9.79E-02  2.75E-01
 ETA6
+       -1.27E-01  1.22E-01  4.42E-02  4.85E-02  2.62E-02  2.91E-01
 ETA7
+       -9.77E-02  1.02E-01 -3.95E-02  7.09E-02 -1.32E-01 -2.80E-02  3.83E-01
 ETA8
+        2.39E-03  4.35E-02 -1.80E-02  3.41E-02 -1.45E-01 -7.44E-02  6.52E-02  6.61E-01
 ETA9
+       -4.50E-02 -9.41E-02  1.26E-02  3.87E-02  1.68E-01  1.35E-02  2.78E-03  2.36E-01  4.50E-01

 SIGMA - CORR MATRIX FOR RANDOM EFFECTS - EPSILONS  ***
         EPS1      EPS2
 EPS1
+        1.94E-01
 EPS2
+        0.00E+00  2.12E-01

 ********************                              NUTS BAYESIAN ANALYSIS                            ********************
 ********************                STANDARD ERROR OF ESTIMATE (From Sample Variance)               ********************

 THETA - VECTOR OF FIXED EFFECTS PARAMETERS   *********
         TH 1      TH 2      TH 3      TH 4      TH 5      TH 6      TH 7      TH 8      TH 9
         1.17E-01  1.49E-01  2.41E-01  1.31E-01  1.97E-01  1.29E-01  1.16E-01  3.24E-01  1.87E-01

 OMEGA - COV MATRIX FOR RANDOM EFFECTS - ETAS  ********
         ETA1      ETA2      ETA3      ETA4      ETA5      ETA6      ETA7      ETA8      ETA9
 ETA1
+        9.50E-02
 ETA2
+        2.69E-02  4.38E-02
 ETA3
+        2.60E-02  1.54E-02  5.29E-02
 ETA4
+        2.86E-02  1.61E-02  1.70E-02  6.88E-02
 ETA5
+        3.01E-02  1.89E-02  2.05E-02  2.23E-02  7.23E-02
 ETA6
+        3.39E-02  2.00E-02  1.92E-02  2.21E-02  2.44E-02  9.87E-02
 ETA7
+        4.12E-02  2.50E-02  2.26E-02  2.71E-02  2.93E-02  3.20E-02  7.77E-02
 ETA8
+        7.65E-02  4.77E-02  4.04E-02  4.96E-02  5.82E-02  5.70E-02  7.15E-02  5.32E-01
 ETA9
+        4.85E-02  2.87E-02  2.59E-02  3.37E-02  4.07E-02  4.07E-02  4.85E-02  1.15E-01  1.81E-01

 SIGMA - COV MATRIX FOR RANDOM EFFECTS - EPSILONS  ****
         EPS1      EPS2
 EPS1
+        2.53E-03
 EPS2
+        0.00E+00  3.46E-03

 OMEGA - CORR MATRIX FOR RANDOM EFFECTS - ETAS  *******
         ETA1      ETA2      ETA3      ETA4      ETA5      ETA6      ETA7      ETA8      ETA9
 ETA1
+        9.82E-02
 ETA2
+        2.51E-01  8.42E-02
 ETA3
+        2.80E-01  2.85E-01  1.07E-01
 ETA4
+        2.26E-01  2.46E-01  2.77E-01  1.05E-01
 ETA5
+        2.46E-01  2.75E-01  2.95E-01  2.70E-01  1.12E-01
 ETA6
+        2.44E-01  2.66E-01  2.78E-01  2.52E-01  2.61E-01  1.38E-01
 ETA7
+        2.15E-01  2.52E-01  2.65E-01  2.37E-01  2.45E-01  2.60E-01  8.96E-02
 ETA8
+        2.27E-01  2.60E-01  2.69E-01  2.55E-01  2.84E-01  2.71E-01  2.35E-01  2.84E-01
 ETA9
+        2.26E-01  2.52E-01  2.72E-01  2.41E-01  2.60E-01  2.52E-01  2.38E-01  2.44E-01  1.55E-01

 SIGMA - CORR MATRIX FOR RANDOM EFFECTS - EPSILONS  ***
         EPS1      EPS2
 EPS1
+        6.50E-03
 EPS2
+        0.00E+00  8.12E-03
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
 ********************                              NUTS BAYESIAN ANALYSIS                            ********************
 ********************           EIGENVALUES OF COR MATRIX OF ESTIMATE (From Sample Variance)         ********************

             1         2         3         4         5         6         7         8         9        10        11        12
             13        14        15        16        17        18        19        20        21        22        23        24
            25        26        27        28        29        30        31        32        33        34        35        36
             37        38        39        40        41        42        43        44        45        46        47        48
            49        50        51        52        53        54        55        56
         1.58E-01  1.95E-01  2.92E-01  3.24E-01  3.83E-01  3.99E-01  4.36E-01  4.55E-01  4.76E-01  4.95E-01  5.07E-01  5.30E-01
          5.64E-01  5.75E-01  5.92E-01  6.15E-01  6.33E-01  6.39E-01  6.81E-01  6.95E-01  7.26E-01  7.46E-01  7.74E-01  7.86E-01
         8.05E-01  8.09E-01  8.38E-01  8.54E-01  8.93E-01  9.09E-01  9.18E-01  9.53E-01  9.97E-01  1.02E+00  1.02E+00  1.03E+00
          1.07E+00  1.08E+00  1.13E+00  1.16E+00  1.19E+00  1.21E+00  1.24E+00  1.27E+00  1.28E+00  1.37E+00  1.37E+00  1.43E+00
         1.49E+00  1.57E+00  1.74E+00  1.76E+00  2.09E+00  2.31E+00  2.90E+00  3.60E+00
 Elapsed postprocess time in seconds:     0.44
 Elapsed finaloutput time in seconds:     0.09
 #CPUT: Total CPU Time in Seconds,    34939.100
