Thu 29 Sep 2022 07:09:53 PM UTC
;;execute NONMEM/pk2cpt.mod -dir NONMEM/pk2cpt -parafile=/opt/NONMEM/nm751/run/mpilinux8.pnm -nodes=4
$PROBLEM    pk2cpt Bayesian model
$DATA      pk2cpt.csv IGNORE=@
$INPUT      TIME ID II EVID DV CMT ADDL AMT
$SUBROUTINE ADVAN4 TRANS4 ;; 2-comp with first order absorption
$PK

  MU_1 = THETA(1)
  TVCL = EXP(MU_1)
  CL = TVCL * EXP(ETA(1))

  MU_2 = THETA(2)
  TVV2  = EXP(MU_2)
  V2 = TVV2

  MU_3 = THETA(3)
  TVQ = EXP(MU_3)
  Q = TVQ

  MU_4 = THETA(4)
  TVV3  = EXP(MU_4)
  V3 = TVV3

  MU_5 = THETA(5)
  TVKA = EXP(MU_5)
  KA = TVKA

  S2 = V2  ;; Scaling compartment (check units of dose and observations)

$THETA  2.0 ; 1 CL log(7.4367958406427)
 3.33 ; 2 Q  log(28.0799996152587)
 4.36 ; 3 Vc log(78.4460632446725)
 4.22 ; 4 Vp log(68.1255965629187)
 0.078 ; 5 Ka log(1.0811298754049)
     ;; initial values
$OMEGA  0.0  FIX  ;             ; one subject
$SIGMA  0.589695154260051  ; residual variability
$ERROR  	;; Calculation based on linear (log-transformed) data
  IPRED = log(F)
  Y = IPRED + ERR(1)

;; bayesian part
$PRIOR      NWPRI
$THETAP  2.3 FIX ; CL log(10)
 2.7 FIX ; Q  log(15)
 3.56 FIX ; Vc log(35)
 4.7 FIX ; Vp log(105)
 0.92 FIX ; Ka log(2.5)
           ;; prior information of THETAS
$THETAPV  BLOCK(5) FIX
 0.25  ;         CL
 0.0 0.5  ;          Q
 0.0 0.0 0.25  ;         Vc
 0.0 0.0 0.0 0.5  ;         Vp
 0.0 0.0 0.0 0.0 1.0  ;         Ka
$OMEGAP  0.0  FIX  ;             ; prior information for OMEGA
$OMEGAPD  1.0 FIX ; ; df for OMEGA prior
$SIGMAP  0.0  FIX  ;             ; prior information for SIGMA
$SIGMAPD  1.0 FIX ; ; df for SIGMA prior
;; 4 chains in parallels
$ESTIMATION METHOD=NUTS AUTO=0 PRINT=100 NBURN=1000 SEED=1 NITER=1000
            NUTS_MAXDEPTH=10 NUTS_DELTA=0.8 FILE=psn.ext
$COVARIANCE PRINT=E UNCONDITIONAL

NM-TRAN MESSAGES
 WARNINGS AND ERRORS (IF ANY) FOR PROBLEM    1
 (WARNING  2) NM-TRAN INFERS THAT THE DATA ARE POPULATION.
 (WARNING  121) INTERACTION IS IMPLIED WITH EM/BAYES ESTIMATION METHODS
 (MU_WARNING 18) MU_001: USED ON THE RIGHT BUT NOT WITH AN ETA.
 (MU_WARNING 18) MU_002: USED ON THE RIGHT BUT NOT WITH AN ETA.
 (MU_WARNING 18) MU_003: USED ON THE RIGHT BUT NOT WITH AN ETA.
 (MU_WARNING 18) MU_004: USED ON THE RIGHT BUT NOT WITH AN ETA.
 (MU_WARNING 18) MU_005: USED ON THE RIGHT BUT NOT WITH AN ETA.
Note: Analytical 2nd Derivatives are constructed in FSUBS but are never used.
      You may insert $ABBR DERIV2=NO after the first $PROB to save FSUBS construction and compilation time

1NONLINEAR MIXED EFFECTS MODEL PROGRAM (NONMEM) VERSION 7.5.1
 ORIGINALLY DEVELOPED BY STUART BEAL, LEWIS SHEINER, AND ALISON BOECKMANN
 CURRENT DEVELOPERS ARE ROBERT BAUER, ICON DEVELOPMENT SOLUTIONS,
 AND ALISON BOECKMANN. IMPLEMENTATION, EFFICIENCY, AND STANDARDIZATION
 PERFORMED BY NOUS INFOSYSTEMS.
 PROBLEM NO.:         1
 pk2cpt Bayesian model
 TOT. NO. OF OBS RECS:       53
 TOT. NO. OF INDIVIDUALS:        1
 TWO COMPARTMENT MODEL WITH FIRST-ORDER ABSORPTION (ADVAN4)
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 #TBLN:      1
 #METH: NUTS Bayesian Analysis
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
 #TERM:
 BURN-IN WAS NOT TESTED FOR CONVERGENCE
 STATISTICAL PORTION WAS COMPLETED

 ETABAR IS THE ARITHMETIC MEAN OF THE ETA-ESTIMATES,
 AND THE P-VALUE IS GIVEN FOR THE NULL HYPOTHESIS THAT THE TRUE MEAN IS 0.

 ETABAR:         0.0000E+00
 SE:             0.0000E+00
 N:                       0

 P VAL.:         1.0000E+00

 ETASHRINKSD(%)  0.0000E+00
 ETASHRINKVR(%)  0.0000E+00
 EBVSHRINKSD(%)  0.0000E+00
 EBVSHRINKVR(%)  0.0000E+00
 RELATIVEINF(%)  0.0000E+00
 EPSSHRINKSD(%)  6.1682E-01
 EPSSHRINKVR(%)  1.2298E+00


 TOTAL DATA POINTS NORMALLY DISTRIBUTED (N):           53
 N*LOG(2PI) CONSTANT TO OBJECTIVE FUNCTION:    97.407484519695302
 OBJECTIVE FUNCTION VALUE WITHOUT CONSTANT:    840.22366192882737
 OBJECTIVE FUNCTION VALUE WITH CONSTANT:       937.63114644852271
 REPORTED OBJECTIVE FUNCTION DOES NOT CONTAIN CONSTANT

 TOTAL EFFECTIVE ETAS (NIND*NETA):                             0
 NIND*NETA*LOG(2PI) CONSTANT TO OBJECTIVE FUNCTION:    0.0000000000000000
 OBJECTIVE FUNCTION VALUE WITHOUT CONSTANT:    840.22366192882737
 OBJECTIVE FUNCTION VALUE WITH CONSTANT:       840.22366192882737
 REPORTED OBJECTIVE FUNCTION DOES NOT CONTAIN CONSTANT

 PRIOR CONSTANT TO OBJECTIVE FUNCTION:    352.25614326420333
 OBJECTIVE FUNCTION VALUE WITHOUT CONSTANT:    840.22366192882737
 OBJECTIVE FUNCTION VALUE WITH CONSTANT:       1192.4798051930306
 REPORTED OBJECTIVE FUNCTION DOES NOT CONTAIN CONSTANT


 #TERE:
 Elapsed estimation  time in seconds:    11.12
 Elapsed covariance  time in seconds:     0.00

 ********************                              NUTS BAYESIAN ANALYSIS                            ********************
 #OBJT:**************                       AVERAGE VALUE OF LIKELIHOOD FUNCTION                     ********************
 #OBJV:********************************************      840.224       **************************************************
 #OBJS:********************************************        3.526 (STD) **************************************************

 ********************                              NUTS BAYESIAN ANALYSIS                            ********************
 ********************                             FINAL PARAMETER ESTIMATE                           ********************

 THETA - VECTOR OF FIXED EFFECTS PARAMETERS   *********
         TH 1      TH 2      TH 3      TH 4      TH 5
         2.30E+00  2.68E+00  3.55E+00  4.74E+00  9.55E-01

 OMEGA - COV MATRIX FOR RANDOM EFFECTS - ETAS  ********
         ETA1
 ETA1
+        0.00E+00

 SIGMA - COV MATRIX FOR RANDOM EFFECTS - EPSILONS  ****
         EPS1
 EPS1
+        1.94E+06

 OMEGA - CORR MATRIX FOR RANDOM EFFECTS - ETAS  *******
         ETA1
 ETA1
+        0.00E+00

 SIGMA - CORR MATRIX FOR RANDOM EFFECTS - EPSILONS  ***
         EPS1
 EPS1
+        1.39E+03

 ********************                              NUTS BAYESIAN ANALYSIS                            ********************
 ********************                STANDARD ERROR OF ESTIMATE (From Sample Variance)               ********************

 THETA - VECTOR OF FIXED EFFECTS PARAMETERS   *********
         TH 1      TH 2      TH 3      TH 4      TH 5
         4.89E-01  6.61E-01  5.16E-01  7.04E-01  1.07E+00

 OMEGA - COV MATRIX FOR RANDOM EFFECTS - ETAS  ********
         ETA1
 ETA1
+        0.00E+00

 SIGMA - COV MATRIX FOR RANDOM EFFECTS - EPSILONS  ****
         EPS1
 EPS1
+        3.76E+05

 OMEGA - CORR MATRIX FOR RANDOM EFFECTS - ETAS  *******
         ETA1
 ETA1
+        0.00E+00

 SIGMA - CORR MATRIX FOR RANDOM EFFECTS - EPSILONS  ***
         EPS1
 EPS1
+        1.33E+02

 ********************                              NUTS BAYESIAN ANALYSIS                            ********************
 ********************               COVARIANCE MATRIX OF ESTIMATE (From Sample Variance)             ********************

            TH 1      TH 2      TH 3      TH 4      TH 5      OM11      SG11
 TH 1
+        2.39E-01
 TH 2
+        4.95E-03  4.37E-01
 TH 3
+        1.61E-03 -1.82E-02  2.66E-01
 TH 4
+        2.27E-02  2.90E-02  1.38E-02  4.96E-01
 TH 5
+        1.03E-02 -9.11E-03 -1.87E-04  1.26E-02  1.13E+00
 OM11
+       ......... ......... ......... ......... ......... .........
 SG11
+       -6.61E+03 -6.98E+03 -1.18E+03  4.97E+03 -2.70E+04  0.00E+00  1.42E+11

 ********************                              NUTS BAYESIAN ANALYSIS                            ********************
 ********************              CORRELATION MATRIX OF ESTIMATE (From Sample Variance)             ********************

            TH 1      TH 2      TH 3      TH 4      TH 5      OM11      SG11
 TH 1
+        4.89E-01
 TH 2
+        1.53E-02  6.61E-01
 TH 3
+        6.40E-03 -5.33E-02  5.16E-01
 TH 4
+        6.60E-02  6.22E-02  3.79E-02  7.04E-01
 TH 5
+        1.97E-02 -1.29E-02 -3.41E-04  1.68E-02  1.07E+00
 OM11
+       ......... ......... ......... ......... ......... .........
 SG11
+       -3.59E-02 -2.81E-02 -6.06E-03  1.88E-02 -6.74E-02  0.00E+00  3.76E+05
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
 ********************                              NUTS BAYESIAN ANALYSIS                            ********************
 ********************           EIGENVALUES OF COR MATRIX OF ESTIMATE (From Sample Variance)         ********************

             1         2         3         4         5         6
         8.66E-01  9.51E-01  9.58E-01  1.05E+00  1.06E+00  1.11E+00
 Elapsed postprocess time in seconds:     0.00
 Elapsed finaloutput time in seconds:     0.01
 #CPUT: Total CPU Time in Seconds,        8.918
